// SBML level 2 version 4

model AMML()

  // Compartments:
  compartment L1 = 1;
  compartment C;
  compartment CL;

  // Species:
  substanceOnly species vC_L1 in L1 = 0;
  substanceOnly species vCCL in CL = 0;
  substanceOnly species vCC in C = 5;

  // Parameters:
  fbCLint = 0.469;
  SFkp = 0.201;
  Kpl = 0.1;
  Qh = 0.1;
  Qha = 0.1;
  Qpv = 0.1;
  Initial_for_Kpl = Kpl;
  Initial_for_Qh = Qh;
  Initial_for_Qha = Qha;
  Initial_for_Qpv = Qpv;
  Initial_for_SFkp = SFkp;
  Initial_for_fbCLint = fbCLint;

  // Assignment rules:
  C := 1;
  CL := 1;
  clearrate := Initial_for_fbCLint/(Initial_for_SFkp*Initial_for_Kpl);
  L1toC := Initial_for_Qh/(Initial_for_SFkp*Initial_for_Kpl);
  CtoL1 := Initial_for_Qha + Initial_for_Qpv;

  // Rate rules:
  L1' = Initial_for_fbCLint/(Initial_for_SFkp*Initial_for_Kpl);

  // Reactions:
  clear: vC_L1 => vCCL; clearrate*(vC_L1/L1);
  L1r: vCC => vC_L1; CtoL1*(vCC/C);
  Cr: vC_L1 => vCC; L1toC*(vC_L1/L1);

  // Unit definitions:
  unit volume = 1e-3 litre;
  unit substance = 1e-3 mole;
end
